variable timestep equal 0.0005
variable tdamp equal 10*${timestep}
variable pdamp equal 100*${timestep}
variable force_sq atom "fx^2+fy^2+fz^2"
newton on
read_restart restart.${read_restart_step}
#neigh_modify one 9000 page 100000 delay 10 every 10 check yes
thermo 10
compute total_force_sq all reduce sum v_force_sq
thermo_style custom step time temp pe ke etotal vol density lx ly lz xy xz yz press pxx pyy pzz pxy pxz pyz c_total_force_sq
mass 1 1.008
timestep ${timestep}
pair_style mliap unified /work/hdd/bcqo/isaitov/HYDROGEN/M29_elite_LLPT-07-29-2025.model-mliap_lammps.pt 0
pair_coeff * * H
dump 1 all custom 100 dump.${read_restart_step}.atom id type x y z
dump_modify 1 sort id
fix 1 all npt temp ${temp} ${temp} ${tdamp} iso ${pressure} ${pressure} ${pdamp}

#compute     myrdf all rdf 500
#fix         a all ave/time 10 200 2000 c_myrdf[*] file tmp.rdf mode vector ave running

run 20000

write_data data.final
write_restart restart.*
