variable timestep equal 0.0005
variable tdamp equal 10*${timestep}
variable pdamp equal 100*${timestep}
variable force_sq atom "fx^2+fy^2+fz^2"
read_restart restart.${read_restart_step}
neigh_modify one 9000 page 100000 delay 10 every 10 check yes
thermo 10
newton on
compute total_force_sq all reduce sum v_force_sq
thermo_style custom step time temp pe ke etotal vol density lx ly lz xy xz yz press pxx pyy pzz pxy pxz pyz c_total_force_sq
mass 1 1.008
timestep ${timestep}
pair_style mace no_domain_decomposition
pair_coeff * * /work/hdd/bcqo/shubhanggoswami/LLPT_Scan/M29/calculator/M29_elite_rcut3.5_lam140_LLPT-07-29-2025_compiled.model-lammps.pt H
#pair_coeff * * /work/nvme/bcqo/shubhanggoswami/MACE_w_LAMMPS/M29/calculator/M29_elite_LLPT-07-29-2025.model-lammps.pt H

dump 1 all custom 100 dump.${read_restart_step}.atom id type x y z
dump_modify 1 sort id
fix 1 all npt temp ${temp} ${temp} ${tdamp} iso ${pressure} ${pressure} ${pdamp}
run 5000
write_restart restart.*
